# Лабораторная работа №2(8)
# Решения уравнений и систем уравнений
№1
1.
x := -3 .. 3
y(x) := 3*cos(x + 1)^2 - 2*x - 2
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x := 0
root(y(x), x) = -0.228762
2.
x := -3 .. 3
y(x) := 4*cos(x) + 0.3*x
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x := 0
root(y(x), x) = 1.69853
№2
V := [75; 70; 36; 10; 1]
x := polyroots(V)
x = [-5; -3; -1 - 2i; -1 + 2i]
№3
x[1] := 1
x[2] := 1
x[3] := 1
x[4] := 1
# 1)
Given
7*x[1] + 7*x[2] - 7*x[3] - 2*x[4] == 5
3*x[1] + 4*x[2] + 5*x[3] + 8*x[4] == 60
2*x[1] + 2*x[2] + 2*x[3] + x[4] == 27
2*x[1] - 2*x[3] - x[4] == -1
V := Find(x[1], x[2], x[3], x[4])  # error: Что-то не так с блоком решения, который используется для определения этой функции.
V = [75; 70; 36; 10; 1]
# 2)
B := [5; 60; 27; -1]
A := [7, 7, -7, -2; 3, 4, 5, 8; 2, 2, 2, 1; 2, -2, 0, -1]
X := -A^-1*B
X = [-3.40924; -3.64026; -6.18152; -0.537954]
# 3)
lsolve(A, B) = [3.40924; 3.64026; 6.18152; 0.537954]
№4
x := 1
y := 1
Given
sin(x) - 2*y == 1
cos(y + 0.5) - x == 2
V := Minerr(x, y)
V = [-1.09739; -0.945011]
