# _(Лабораторная работа 10(4))
1.
Z(a) :=
    z ← ((1 + a + a^2)/(2*a + a^2) + 2 - (1 - a + a^2)/(2*a - a^2))^-1*(5 - 2*a^2)
    return z
Z(6) = -16
2.
a := 2.6
b := -0.39
S(x) :=
    (a + b)/(e^x + cos(x)) if (x < 2.8)
    (a + b)/(x + 1) if (2.8 ≤ x < 6)
    (e^x + sin(x)) if x ≥ 6
S(x) =  # error: Эта переменная не определена.
