# №1 | "Лабораторная работа №1 студента Шастовская Марина" | №4
№2
A := [5, 9, 4; 3, 8, 15; 2, 28, 1]
B := [34, 5, 12; 9, 6, 46; 10, 54, 1]
n := 14
x := 2
# a)
# б)
y := (sqrt(x^3 + n) + cos(|n*x - 1|))/nthroot(x^5 + 8*x + n, 4) = 1.56742
4*sqrt(5 - 2*sqrt(6))/((nthroot(3, 4) + nthroot(2, 4))*(nthroot(2, 4) - nthroot(3, 4))) = -4
V := [5; 8; 9]
C := A*B = [291, 295, 478; 324, 873, 419; 330, 232, 1313]
# в)
t := (sum(sin(i/n), i = 1 .. 10) + sum((i - n)/(i + n), i = 1 .. 5))/product((n + 3i)/(n^2 + n*i - n), i = 1 .. 5) = 206189 - 364049i
d := |A|*|B| = 118787325
g := transpose(V)*A*B = [7017, 10547, 17559]
№3
dx := 0.2
E := A^-1*C - B = [0, 5.32907e-15, 1.42109e-14; 0, 8.88178e-16, 7.10543e-15; -1.77636e-15, -7.10543e-15, -5.32907e-15]
x := -2, -1.8 .. 2
S := B*V = [318; 507; 491]
y(x) := cos(3*x - 1)^2 + sin(π/12)
q := max(A) = 28
x = [-2; -1.8; -1.6; -1.4; -1.2; -1; -0.8; -0.6; -0.4; -0.2; 0; 0.2; 0.4; 0.6; 0.8; 1; 1.2; 1.4; 1.6; 1.8; 2]
y(x) = [0.827188; 1.24524; 1.04296; 0.478327; 0.271397; 0.686069; 1.19352; 1.1466; 0.605153; 0.259672; 0.550746; 1.10717; 1.21935; 0.744219; 0.287708; 0.431997; 0.993077; 1.25541; 0.884449; 0.353273; 0.339283]
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p := min(B) = 1
a := -(π/2)
b := π/2
integral(cos(3*t - 1)^2 + sin(π/12), t = a .. b) = 2.3839
№5
# №5 | B9
x := -5, -4.8 .. 5
y := -5, -4.8 .. 5
x := -5, -4.8 .. 5
y := -5, -4.8 .. 5
dx := 0.2
dy := 0.2
x0 := -5
y0 := -5
g(x, y) := (sin(x)/x)*(sin(y)/y)
f(x, y) := (sin(x)^2/x)*sin(y)^2/y
# Построение графика не возможно ! Так как деление на 0
# [component: inputs g]
n := 50
i := 0 .. n
j := 0 .. n
x[i] := -5 + i*dx
y[j] := -5 + j*dy
M[i, j] := f(x[i]*y[j])
# [component: inputs M]
