# Лабораторная работа 9(3)
№1
limit(sin(a*x)/sin(b*x), x → 0) → a/b
y(x) := ln(cos(3*x - 1)^2 + sin(π/12))^3 → ln(cos(3*x - 1)^2 - sqrt(2)/4 + sqrt(6)/4)^3
integral((1 - sin(x)^2)/(1 + 3*cos(x)), x) → sin(x)/3 - x/9 - sqrt(2)*ln(2*cos(x)/3 - 4*sqrt(2)*sin(x)/3 + 2)/72 + sqrt(2)*ln(2*cos(x)/3 + 4*sqrt(2)*sin(x)/3 + 2)/72
# №2 | из 2 лр задание 1
3*cos(x + 1)^2 - 2*x - 2
-0.228762237676
4*cos(x) + 0.3*x
-12.8394099893
# из 2 лр задание 2
x^4 + 10*x^3 + 36*x^2*70*x + 75 == 0
[
    sqrt(1600225*(250*sqrt(921859218209) + 240033750)^(1/3) + (120016875000*sqrt(921859218209) + 115232402277125000)^(1/3) + 100)/(2*(250*sqrt(921859218209) + 240033750)^(1/6)) + sqrt(9601350*(250*sqrt(921859218209) + 240033750)^(1/3)*sqrt(1600225*(250*sqrt(921859218209) + 240033750)^(1/3) + (120016875000*sqrt(921859218209) + 115232402277125000)^(1/3) + 100) - 300*sqrt(1600225*(250*sqrt(921859218209) + 240033750)^(1/3) + (120016875000*sqrt(921859218209) + 115232402277125000)^(1/3) + 100) - 3*(120016875000*sqrt(921859218209) + 115232402277125000)^(1/3)*sqrt(1600225*(250*sqrt(921859218209) + 240033750)^(1/3) + (120016875000*sqrt(921859218209) + 115232402277125000)^(1/3) + 100) - 60728538750*sqrt(4800655) - 60728538750*sqrt(4800695))/(2*(250*sqrt(921859218209) + 240033750)^(1/6)*(14402025*(250*sqrt(921859218209) + 240033750)^(1/3) + 9*(120016875000*sqrt(921859218209) + 115232402277125000)^(1/3) + 900)^(1/4)) - 1265/2;
    sqrt(9601350*(250*sqrt(921859218209) + 240033750)^(1/3)*sqrt(1600225*(250*sqrt(921859218209) + 240033750)^(1/3) + (120016875000*sqrt(921859218209) + 115232402277125000)^(1/3) + 100) - 300*sqrt(1600225*(250*sqrt(921859218209) + 240033750)^(1/3) + (120016875000*sqrt(921859218209) + 115232402277125000)^(1/3) + 100) - 3*(120016875000*sqrt(921859218209) + 115232402277125000)^(1/3)*sqrt(1600225*(250*sqrt(921859218209) + 240033750)^(1/3) + (120016875000*sqrt(921859218209) + 115232402277125000)^(1/3) + 100) + 60728538750*sqrt(4800655) + 60728538750*sqrt(4800695))/(2*(250*sqrt(921859218209) + 240033750)^(1/6)*(14402025*(250*sqrt(921859218209) + 240033750)^(1/3) + 9*(120016875000*sqrt(921859218209) + 115232402277125000)^(1/3) + 900)^(1/4)) - sqrt(1600225*(250*sqrt(921859218209) + 240033750)^(1/3) + (120016875000*sqrt(921859218209) + 115232402277125000)^(1/3) + 100)/(2*(250*sqrt(921859218209) + 240033750)^(1/6)) - 1265/2;
    sqrt(1600225*(250*sqrt(921859218209) + 240033750)^(1/3) + (120016875000*sqrt(921859218209) + 115232402277125000)^(1/3) + 100)/(2*(250*sqrt(921859218209) + 240033750)^(1/6)) - sqrt(9601350*(250*sqrt(921859218209) + 240033750)^(1/3)*sqrt(1600225*(250*sqrt(921859218209) + 240033750)^(1/3) + (120016875000*sqrt(921859218209) + 115232402277125000)^(1/3) + 100) - 300*sqrt(1600225*(250*sqrt(921859218209) + 240033750)^(1/3) + (120016875000*sqrt(921859218209) + 115232402277125000)^(1/3) + 100) - 3*(120016875000*sqrt(921859218209) + 115232402277125000)^(1/3)*sqrt(1600225*(250*sqrt(921859218209) + 240033750)^(1/3) + (120016875000*sqrt(921859218209) + 115232402277125000)^(1/3) + 100) - 60728538750*sqrt(4800655) - 60728538750*sqrt(4800695))/(2*(250*sqrt(921859218209) + 240033750)^(1/6)*(14402025*(250*sqrt(921859218209) + 240033750)^(1/3) + 9*(120016875000*sqrt(921859218209) + 115232402277125000)^(1/3) + 900)^(1/4)) - 1265/2;
    -sqrt(1600225*(250*sqrt(921859218209) + 240033750)^(1/3) + (120016875000*sqrt(921859218209) + 115232402277125000)^(1/3) + 100)/(2*(250*sqrt(921859218209) + 240033750)^(1/6)) - sqrt(9601350*(250*sqrt(921859218209) + 240033750)^(1/3)*sqrt(1600225*(250*sqrt(921859218209) + 240033750)^(1/3) + (120016875000*sqrt(921859218209) + 115232402277125000)^(1/3) + 100) - 300*sqrt(1600225*(250*sqrt(921859218209) + 240033750)^(1/3) + (120016875000*sqrt(921859218209) + 115232402277125000)^(1/3) + 100) - 3*(120016875000*sqrt(921859218209) + 115232402277125000)^(1/3)*sqrt(1600225*(250*sqrt(921859218209) + 240033750)^(1/3) + (120016875000*sqrt(921859218209) + 115232402277125000)^(1/3) + 100) + 60728538750*sqrt(4800655) + 60728538750*sqrt(4800695))/(2*(250*sqrt(921859218209) + 240033750)^(1/6)*(14402025*(250*sqrt(921859218209) + 240033750)^(1/3) + 9*(120016875000*sqrt(921859218209) + 115232402277125000)^(1/3) + 900)^(1/4)) - 1265/2
]
№3
x := -5 .. 5
f1(x) := sqrt(x)
f2(x) := e^x
f3(x) := ln(x)
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№4
b := -1.74
k := 6
i := 0, 0.5 .. 3
s := 1.5
f(i) := if(s > i, cos(i + b), i + k^2)
f(i) = [-0.168397; 0.324796; 0.738469; 37.5; 38; 38.5; 39]
